OpenVSP model (file version 5), 1 components.
Geometry view with OpenVSP parameter names; values to 6 digits, angles in degrees, lengths in the model's unit.
Overall bounding box: X_Min=-0.0294372 X_Len=22.3235 Y_Min=-17.954 Y_Len=35.9081 Z_Min=-1.4982 Z_Len=3.61451

Wing "Wing"
  location (X Y Z) 0 0 0, rotation 0 0 0
  symmetric about XZ
  bounding box size 22.3235 35.9081 3.61451
  mass: Density=254 Shell_Flag=0 Mass_Area=1 Mass_Prior=0
  totals: TotalSpan=36 TotalProjectedSpan=35.9081 TotalChord=9.68583 TotalArea=276.085 TotalAR=4.67026
  root: chord 20, twist 0, NACA 5-digit CamberLoc=0.15 IdealCl=0.3 ThickChord=0.18
  sections:
    n  Span   Root_Chord  Tip_Chord  Area     Sweep    Sweep_Location  Dihedral  Twist     Twist_Location  tip airfoil
    1  3.92   20          10.8127    60.3929  55.8064  0               0         -2.00983  1               NACA 4-series Camber=0 CamberLoc=0.2 ThickChord=0.18
    2  2      10.8127     6.50003    17.3127  50.8548  0               0         -3        0.25            airfoil file "NASA SC_2-0404 (scaled)"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 BaseThickChord=0.0401096 ThickChord=0.1
    3  12.08  6.50003     3.48954    60.337   41.2013  0               -5        -3.5      1               as above

VSPAERO settings: Sref=276.085 bref=36 cref=9.68583 Xcg=10.0342 Ycg=0 Zcg=-0.0241974 AlphaStart=-5 AlphaEnd=10 AlphaNpts=16 BetaStart=0 BetaEnd=0 BetaNpts=1 MachStart=0.8 MachEnd=0 MachNpts=1 ReCref=1e+08 Vinf=245 Rho=0.45
