OpenVSP model (file version 5), 1 components.
Geometry view with OpenVSP parameter names; values to 6 digits, angles in degrees, lengths in the model's unit.
Overall bounding box: X_Min=0 X_Len=21.9743 Y_Min=-16.4357 Y_Len=32.8714 Z_Min=-1.3186 Z_Len=2.63719

Wing "FAST-OAD-BWB_Tutorial_NACA63A012.vsp3"
  location (X Y Z) 0 0 0, rotation 0 0 0
  symmetric about XZ
  bounding box size 21.9743 32.8714 2.63719
  mass: Density=250 Shell_Flag=0 Mass_Area=1 Mass_Prior=0
  totals: TotalSpan=32.8714 TotalProjectedSpan=32.8714 TotalChord=14.7934 TotalArea=424.429 TotalAR=2.54584
  root: chord 21.9743, twist 0, airfoil file "NACA 63A012"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 BaseThickChord=0.119956 ThickChord=0.119956
  sections:
    n  Span     Root_Chord  Tip_Chord  Area     Sweep    Sweep_Location  Dihedral  Twist  Twist_Location  tip airfoil
    1  3.692    21.9743     16.1338    70.3475  45       0               0         0      0               as above
    2  2.47138  16.1338     14.1939    37.4757  33.5261  0               0         0      0               as above
    3  10.2723  14.1939     6.13085    104.391  38.1296  0               0         0      0               as above

VSPAERO settings: Sref=424.429 bref=32.8714 cref=14.7934 Xcg=0 Ycg=0 Zcg=0 AlphaStart=1 AlphaEnd=10 AlphaNpts=3 BetaStart=0 BetaEnd=0 BetaNpts=1 MachStart=0 MachEnd=0 MachNpts=1 ReCref=1e+07 Vinf=100 Rho=0.002377
